// COMSOL Multiphysics 6.1.0.282 model "IceShelf2D_forward.mph"
// Outline of the model tree

Parameters
  Lx = 8e4[m]
  Ly = 5e4[m]
  h0 = 500[m]
  rhoi = 917[kg/m^3]
  rhow = 1030[kg/m^3]
  g = 9.8[m/s^2]
  secinyear = 86400*365.25[s]
  nu0 = 5e13 [Pa*s]  // viscosity scale
  u0 = 1000[m]/secinyear  // velocity scale

Variables
  var2 "Variables 2a"
    nu = nu0 * (1-.5*cos(2*pi*y/Ly)) * (2 + x/Lx)/3  // given viscosity
    Hin = h0-(h0-200)/Lx*x  // initial guess of thickness
    speed = sqrt(u^2+v^2)  // velocity magnitude
    eb1 = 2*nu*(2*ux+vy) - 0.5*rhoi*g*H*(1-rhoi/rhow)
    eb2 = nu*(uy+vx)

Couplings
  genext1: GeneralExtrusion on all domains | dstmap = {x, y}; srcmap = {x, y}

Geometry
  geom2 "Geometry 2" (2D, length unit m)
    r1: Rectangle | size = {Lx, Ly}
    fin: Finalize "Form Union"

Physics
  c: CoefficientFormPDE "PDE" on all domains
    dependent variable u = {u, v}
    Units.DependentVariableQuantity = none
    Units.CustomDependentVariableUnit = m/s
    cfeq1: CoefficientFormPDE (default)
      c = {{-4*nu*H, 0, 0, -nu*H}, {0, -2*nu*H, -nu*H, 0}, {0, -nu*H, -2*nu*H, 0}, {-nu*H, 0, 0, -4*nu*H}}
      f = {rhoi*g*(1-rhoi/rhow)*H*Hx, rhoi*g*(1-rhoi/rhow)*H*Hy}
      da = {1, 0, 0, 1}
    zflx1: ZeroFluxBoundary "Zero Flux 1" (default)
    init1: init "Initial Values 1" (default) | u = 0; v = 0
    dir1: DirichletBoundary "Dirichlet Boundary Condition 1" on boundaries 2, 3 | r = {u0 * (1.2*x/Lx)^2, 0}
    dir2: DirichletBoundary "Dirichlet Boundary Condition 2" on boundaries 1 | r = {u0*4*s*(1-s), 0}
    flux1: FluxBoundary "Flux/Source 1" on boundaries 4 | g = {-rhoi*g*H^2/2*(1-rhoi/rhow), 0}
  c2: CoefficientFormPDE "PDE 2" on all domains
    dependent variable H
    Units.DependentVariableQuantity = none
    Units.CustomDependentVariableUnit = m
    cfeq1: CoefficientFormPDE (default) | c = {0, 0, 0, 0}; a = (ux+vy); f = 0; da = 1; be = {u, v}
    zflx1: ZeroFluxBoundary "Zero Flux 1" (default)
    init1: init "Initial Values 1" (default) | H = Hin
    dir1: DirichletBoundary "Dirichlet Boundary Condition 1" on boundaries 1 | r = h0 * (1-3*(s-0.5)^4)

Mesh
  mesh2 "Mesh 2"
    size: MeshSizeDefault | hmax = 500; hauto = 1; custom = on
    fq1: FreeQuad on remaining entities | xscale = 1.5; yscale = 1.5
    bl1: BndLayer "Boundary Layers 1" on all domains
      blp: BndLayerProp "Boundary Layer Properties" on boundaries 1-4
        blnlayers = 15
        blstretch = 1.15
        inittype = blhmin
        blhmin = 35

Studies
  std1 "Study 1"
    stat: Stationary

Solver configurations
  sol1 "Solution 1" (study std1)
    v1: Variables "Dependent Variables 1"
    s1: Stationary "Stationary Solver 1" | stol = 0.00001
      dDef: Direct
      fc1: FullyCoupled | linsolver = dDef

Datasets
  dset1: Solution | solution = sol1

Plots
  pg1: PlotGroup2D "Velocity Plot" | data = dset1
    surf1: Surface | expr = u
    arws1: ArrowSurface | expr = {u, v}
  pg3: PlotGroup2D "Thickness Plot" | data = dset1
    surf1: Surface | expr = H
  pg2: PlotGroup2D "Viscosity given" | data = dset1
    surf1: Surface | expr = nu
  pg4: PlotGroup2D "bdry_hori" | data = dset1
    surf1: Surface | expr = eb1
  pg5: PlotGroup2D "bdry_vert" | data = dset1
    surf1: Surface | expr = eb2

Exports
  data1: Data
    data = dset1
    expr = {u, v, H, nu, , }
    unit = {m/s, m/s, m, Pa*s, , }
    descr = {Dependent variable u, Dependent variable v, Dependent variable H, given viscosity, , }
    filename = SynData_exp1.txt
    location = regulargrid
    regulargridx2 = 400
    regulargridy2 = 250